!   Commands inserted into this file will be executed just prior to the ANSYS SOLVE command.
!   These commands may supersede command settings set by Workbench.

!   Active UNIT system in Workbench when this object was created:  Metric (m, kg, N, s, V, A)
!   NOTE:  Any data that requires units (such as mass) is assumed to be in the consistent solver unit system.
!                See Solving Units in the help system for more information.


/PREP7

*DO, i, 1, 4
    ET,i,PLANE182
    KEYOPT, i, 1, 3     ! Element technology: KEYOPT(1)
                            ! 0 -- Full integration with Bbar method
                            ! 1 -- Uniform reduced integration with hourglass control
                            ! 2 -- Enhanced strain formulation
                            ! 3 -- Simplified enhanced strain formulation
    KEYOPT, i, 6, 0     ! 0 -- no u-P (default)
    KEYOPT, i, 3, 2     ! 2 -- Plane strain
    ! R,1,THICKNESS     ! Thickness for plane stress (if applicable)
*ENDDO

FINISH           ! Exit preprocessor

!!!!!!!!!!!!!!!!!!!!!!!!!!!!!!!!!!!!!!!!!!!!!!!!!!!!
/SOLU            ! Enter solution phase

EMATWRITE, YES
ERESX, YES	 ! YES/NO: Extrapolate/No-extrapolate, assign integration points values to nearest nodes
